# С фиксированными радиусами
i := 0
x := [4; 5; 6; 7; 8; 9; 10; 11; 12; 13]
h := 1
n := length(x)
Circle := [1; 3; 5; 6; 7; 9; 10; 13; 15; 17; 21; 25; 30; 35; 40; 45; 50]
core5Time := [1.64; 2.03; 3.13; 2.99; 2.89; 4.20; 19.02; 7.08; 35.76; 112; 378; 211.8; 240; 692.4; 447; 627; 630]
core3Time := [0.83; 1.36; 2.46; 3.58; 6.88; 12.54; 29.15; 45.51; 52.21; 71.4; 144; 430.8; 511.2; 558.6; 1027.8; 1162.8; 2613]
cpu := [22; 25; 30; 32; 31; 42; 37; 45; 51; 34; 33; 30; 30; 34; 40; 40; 47]
y :=
    for i ∈ 0 .. n - 1
        y[i] ← e^x[i]
    y
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# 1) 5x5
# 2) 3x7 +4
# 3) 2x10 +5
# 4) 2x12 +2
unfixed := [122; 175; 180; 360]
j := [1; 2; 3; 4]
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# 5 +25 Fixed +Unfixed
# 1)5+ 2x12+2  1)2*10+3+5
# 2)5+ 3x7+4  2)6*4+1+5
# 3)5+ 2x10+5  3)8*3+1+5
# 4) 5+ 5x5
fullTime5_25 := [334; 399; 695; 640]
Fixed5 := [159; 210; 215; 240]
UnFixed25 := [175; 189; 480; 400]
j = [1; 2; 3; 4]
RunTime_25 := [611; 382; 691]
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# Рандомное распределение по группам  для 25 нефикс. кругов
y :=
    for i ∈ 0 .. n - 1
        y[i] ← e^(-x)[i]
    y
rndTime := [15; 53; 83; 75; 140; 540]
countGroup := [7; 6; 5; 4; 3; 2]
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